# OpenSim document version 40000
MarkerSet:
  Marker RASI: pelvis (0.006437494 0.00524467 0.128) fixed=true
  Marker LASI: pelvis (0.00643749 0.00524467 -0.128) fixed=true
  Marker RPSI: pelvis (-0.151485 0.0161743 0.07233405) fixed=true
  Marker LPSI: pelvis (-0.1514852 0.01617428 -0.07403949) fixed=true
  Marker RTHI: femur_r (0.018 -0.2 0.064)
  Marker RTHAD: femur_r (0.021084 -0.242485 0.06)
  Marker RTHAP: femur_r (-0.0116293 -0.243342 0.0625124)
  Marker RKNE: femur_r (1.921503e-11 -0.3957605 0.05)
  Marker RKNEM: femur_r (1.417681e-11 -0.3979209 -0.05)
  Marker RTIB: tibia_r (0.00500574 -0.180004 0.0500002)
  Marker RTIAP: tibia_r (0.00443791 -0.232138 0.0500005)
  Marker RTIAD: tibia_r (-0.0296339 -0.232529 0.0565549)
  Marker RANK: tibia_r (-0.005 -0.3831316 0.053) fixed=true
  Marker RTOE: toes_r (-0.05219768 0.05307764 -0.004777537)
  Marker RHEE: calcn_r (-0.02 0.02 0)
  Marker RVMH: toes_r (-0.04301766 0.01383907 0.0589255)
  Marker RFMH: calcn_r (0.1897302 0.02072521 -0.048888)
  Marker LTHI: femur_l (0.018 -0.2 -0.064)
  Marker LTHAP: femur_l (-0.01162931 -0.243342 -0.06251242)
  Marker LTHAD: femur_l (0.02108399 -0.2424848 -0.06)
  Marker LKNE: femur_l (1.9215e-11 -0.39576 -0.05) fixed=true
  Marker LKNEM: femur_l (1.41768e-11 -0.397921 0.05)
  Marker LTIB: tibia_l (0.005005745 -0.1800041 -0.05000018)
  Marker LTIAP: tibia_l (-0.02963388 -0.2325293 -0.05655489)
  Marker LTIAD: tibia_l (0.004437908 -0.2321383 -0.05000053)
  Marker LANK: tibia_l (-0.005 -0.3815423 -0.053) fixed=true
  Marker LTOE: toes_l (-0.06647071 0.04866892 0.004751475) fixed=true
  Marker LHEE: calcn_l (-0.02 0.02 0)
  Marker LVMH: calcn_l (0.135782 0.0118391 -0.0600055)
  Marker LFMH: toes_l (0.01093 0.0227252 0.049968)
  Marker RHJCWK: femur_r (0 0 0) fixed=true
  Marker LHJCWK: femur_l (0 0 0) fixed=true
  Marker RKJCWK: tibia_r (-3.698603e-7 0.007404499 -1.186885e-8) fixed=true
  Marker LKJCWK: tibia_l (-3.6986e-7 0.0074045 1.18689e-8) fixed=true
  Marker LAJCWK: talus_l (0 0 0) fixed=true
  Marker RAJCWK: talus_r (0 0 0) fixed=true
  Marker RMED: tibia_r (0.007417328 -0.3831908 -0.04610363) fixed=true
  Marker LMED: tibia_l (0.007417 -0.383191 0.046104) fixed=true
  Marker T10: torso (-0.1117556 0.2053429 0)
  Marker T2: torso (-0.09013189 0.3895017 0)
  Marker CLAV: torso (0.04819187 0.3718909 0)
  Marker RBAK: torso (-0.1081114 0.3082515 0.08211047)
