# OpenSim document version 40000
InverseKinematicsTool:
  time_range: 0.01 5.305
  output_motion_file: joint_angles.mot
  marker_file: marker_experimental.trc
  IKTaskSet:
    IKMarkerTask RASI: apply=true weight=1
    IKMarkerTask LASI: apply=true weight=1
    IKMarkerTask RPSI: apply=true weight=1
    IKMarkerTask LPSI: apply=true weight=1
    IKMarkerTask RTHI: apply=true weight=1
    IKMarkerTask RTHAD: apply=true weight=1
    IKMarkerTask RTHAP: apply=true weight=1
    IKMarkerTask RKNE: apply=false weight=1
    IKMarkerTask RTIB: apply=true weight=1
    IKMarkerTask RTIAP: apply=true weight=1
    IKMarkerTask RTIAD: apply=true weight=1
    IKMarkerTask RANK: apply=false weight=1
    IKMarkerTask RTOE: apply=true weight=1
    IKMarkerTask RHEE: apply=true weight=1
    IKMarkerTask RVMH: apply=true weight=1
    IKMarkerTask RFMH: apply=true weight=1
    IKMarkerTask LTHI: apply=true weight=1
    IKMarkerTask LTHAP: apply=true weight=1
    IKMarkerTask LTHAD: apply=true weight=1
    IKMarkerTask LKNE: apply=false weight=1
    IKMarkerTask LTIB: apply=true weight=1
    IKMarkerTask LTIAP: apply=true weight=1
    IKMarkerTask LTIAD: apply=true weight=1
    IKMarkerTask LANK: apply=false weight=1
    IKMarkerTask LTOE: apply=true weight=1
    IKMarkerTask LHEE: apply=true weight=1
    IKMarkerTask LVMH: apply=true weight=1
    IKMarkerTask LFMH: apply=true weight=1
