# OpenSim document version 40500
Model:
  Ground
  BodySet:
    Body: mass=1 [kg] mass_center=(0 0 0) inertia=(0 0 0 0 0 0)
  JointSet:
    PinJoint joint: socket_parent_frame=ground_offset socket_child_frame=body_offset
      Coordinate joint_coord_0
      PhysicalOffsetFrame ground_offset: socket_parent=/ground translation=(0 0 0) [meters]
      PhysicalOffsetFrame body_offset: socket_parent=/bodyset/body translation=(0 0 0)
  ControllerSet:
    PrescribedController: actuator_list=muscle
      FunctionSet ControlFunctions:
        StepFunction: transition_start_time=0.1 transition_end_time=0.2 start_value=0.3 end_value=0.5
  ForceSet:
    Millard2012EquilibriumMuscle muscle: min_control=0.01 max_control=1 max_isometric_force=200
        optimal_fiber_length=0.6 tendon_slack_length=0.55 pennation_angle_at_optimal=0 [radians]
      PathPoint origin: ground (0 1 0)
      PathPoint insertion: body (0 -0.5 0)
      ActiveForceLengthCurve: minimum_value=0
      ForceVelocityCurve: concentric_slope_at_vmax=0 concentric_slope_near_vmax=0.25 isometric_slope=5
          eccentric_slope_at_vmax=0 eccentric_slope_near_vmax=0.15 max_eccentric_velocity_force_multiplier=1.4
      FiberForceLengthCurve
      TendonForceLengthCurve
